units metal
atom_style atomic
boundary p p f
newton on
read_data data.lammps
pair_style flare
pair_coeff * * /anvil/scratch/x-rywang/Au_Cl/rough_sampling_v1/potential/Au_training/lmp_t0.0001_no_bulk_vac_fix3.header2025.flare
group frozen id 1:128 171:173 179:180 187 227:229 234:237 242:244 250:251 275:276 280:282 286:288 292:293 298
group mobile subtract all frozen
fix hold frozen setforce 0.0 0.0 0.0
min_style cg
minimize 1e-8 1e-4 500 5000
write_data min.data
