units metal
atom_style atomic
boundary p p f
newton on
read_data data.lammps
pair_style flare
pair_coeff * * /anvil/scratch/x-rywang/Au_Cl/rough_sampling_v1/potential/Au_training/lmp_t0.0001_no_bulk_vac_fix3.header2025.flare
group frozen id 1:160 213:215 223:224 233 283:285 292:295 302:304 312:313 344:346 350:353 358:361 366:368 374:375
group mobile subtract all frozen
fix hold frozen setforce 0.0 0.0 0.0
min_style cg
minimize 1e-8 1e-4 500 5000
write_data min.data
